<?xml version="1.0"?>
<?xml-stylesheet type="text/xsl" href="http://jsbsim.sourceforge.net/JSBSim.xsl"?>
<!-- JSBSim 飞行动力学模型配置文件：MQ-9 Reaper无人机 -->
<fdm_config name="MQ-9 Reaper" version="2.0" release="ALPHA"
   xmlns:xsi="http://www.w3.org/2001/XMLSchema-instance"
   xsi:noNamespaceSchemaLocation="http://jsbsim.sourceforge.net/JSBSim.xsd">

 <!-- 文件头信息：作者、创建日期、版本、模型描述 -->
 <fileheader>
  <author> Petar Jedvaj </author>
  <filecreationdate>2016-06-29</filecreationdate>
  <version>$Revision: 1.15 $</version>
  <description> General Atomics MQ-9 Reaper. </description>
 </fileheader>

<!-- 飞机几何尺寸与气动参考参数定义模块 -->
<metrics>
   <!-- 机翼面积，单位：平方英尺 -->
   <wingarea  unit="FT2">   257.28 </wingarea>
   <!-- 翼展，单位：英尺 -->
   <wingspan  unit="FT" >    65.58 </wingspan>
   <!-- 机翼安装角 -->
   <wing_incidence>           2.00 </wing_incidence>
   <!-- 平均气动弦长，单位：英尺 -->
   <chord     unit="FT" >     3.92 </chord>
   <!-- 水平尾翼面积 -->
   <htailarea unit="FT2">    41.17 </htailarea>
   <!-- 水平尾翼力臂 -->
   <htailarm  unit="FT" >    18.76 </htailarm>
   <!-- 垂直尾翼面积 -->
   <vtailarea  unit="FT2">   25.73 </vtailarea>
   <!-- 垂直尾翼力臂 -->
   <vtailarm  unit="FT" >    18.04 </vtailarm>
   <!-- 气动参考点AERORP坐标，单位：英寸 -->
   <location name="AERORP" unit="IN">
     <x>   207.84 </x>
     <y>     0.00 </y>
     <z>     0.00 </z>
   </location>
   <!-- 视点位置，单位：英寸 -->
   <location name="EYEPOINT" unit="IN">
     <x>    56.29 </x>
     <y>   -18.00 </y>
     <z>    45.00 </z>
   </location>
   <!-- 视觉参考点VRP -->
   <location name="VRP" unit="IN">
     <x>     0.0 </x>
     <y>     0.0 </y>
     <z>     0.0 </z>
   </location>
 </metrics>

 <!-- 质量与平衡模块：转动惯量、重量、重心、集中质量 -->
 <mass_balance>
   <!-- 绕X轴转动惯量 -->
   <ixx unit="SLUG*FT2">  11931.18 </ixx>
   <!-- 绕Y轴转动惯量 -->
   <iyy unit="SLUG*FT2">   6420.77 </iyy>
   <!-- 绕Z轴转动惯量 -->
   <izz unit="SLUG*FT2">  17344.61 </izz>
   <!-- 空机重量，单位：磅 -->
   <emptywt unit="LBS" >   4901.00 </emptywt>
   <!-- 重心CG位置坐标，单位：英寸 -->
   <location name="CG" unit="IN">
     <x>   207.84 </x>
     <y>     0.00 </y>
     <z>   -10.82 </z>
   </location>
  <!-- 有效载荷集中质量 -->
  <pointmass name="Payload">
    <weight unit="LBS">   2019.94 </weight>
    <location name="POINTMASS" unit="IN">
      <x> 207.84 </x>
      <y>   0.00 </y>
      <z> -10.82 </z>
    </location>
  </pointmass>

  <!-- 挂点1集中质量 -->
  <pointmass name="station1">
      <weight unit="LBS"> 100 </weight>
      <location name="POINTMASS" unit="IN">
        <x> 207.84 </x>
        <y>   0.00 </y>
        <z> -10.82 </z>
      </location>
  </pointmass>

   <!-- 挂点2集中质量 -->
   <pointmass name="station2">
      <weight unit="LBS"> 100 </weight>
      <location name="POINTMASS" unit="IN">
          <x> 207.84 </x>
          <y> -74 </y>
          <z>  -3 </z>
      </location>
   </pointmass>

   <!-- 挂点3集中质量 -->
   <pointmass name="station3">
      <weight unit="LBS"> 510 </weight>
      <location name="POINTMASS" unit="IN">
          <x> 207.84 </x>
          <y> -48 </y>
          <z>  -3 </z>
      </location>
   </pointmass>

   <!-- 挂点4集中质量 -->
   <pointmass name="station4">
      <weight unit="LBS"> 510 </weight>
      <location name="POINTMASS" unit="IN">
          <x> 207.84 </x>
          <y>  48 </y>
          <z>  -3 </z>
      </location>
   </pointmass>

   <!-- 挂点5集中质量 -->
   <pointmass name="station5">
      <weight unit="LBS"> 100 </weight>
      <location name="POINTMASS" unit="IN">
          <x> 207.84 </x>
          <y>  74 </y>
          <z>  -3 </z>
      </location>
   </pointmass>

   <!-- 挂点6集中质量 -->
   <pointmass name="station6">
      <weight unit="LBS"> 100 </weight>
      <location name="POINTMASS" unit="IN">
          <x> 207.84 </x>
          <y>  89 </y>
          <z>  -3 </z>
      </location>
  </pointmass>

 </mass_balance>

 <!-- 地面反应力模块：起落架与机体结构接地特性 -->
 <ground_reactions>

  <!-- 前起落架：可转向、无刹车、可收放 -->
  <contact type="BOGEY" name="NOSE">
    <!-- 安装位置，单位：英寸 -->
    <location unit="IN">
      <x>    56.29 </x>
      <y>     0.00 </y>
      <z>   -51.96 </z>
    </location>
    <!-- 静摩擦系数 -->
    <static_friction>  0.80 </static_friction>
    <!-- 动摩擦系数 -->
    <dynamic_friction> 0.50 </dynamic_friction>
    <!-- 滚动摩擦系数 -->
    <rolling_friction> 0.02 </rolling_friction>
    <!-- 弹簧刚度系数 -->
    <spring_coeff  unit="LBS/FT">     3148.20 </spring_coeff>
    <!-- 阻尼系数 -->
    <damping_coeff unit="LBS/FT/SEC"> 1574.10 </damping_coeff>
    <!-- 最大转向角度，单位：度 -->
    <max_steer unit="DEG"> 5.00 </max_steer>
    <!-- 刹车组：无前轮刹车 -->
    <brake_group> NONE </brake_group>
    <!-- 可收放起落架 -->
    <retractable> 1 </retractable>
  </contact>

  <!-- 左主起落架 -->
  <contact type="BOGEY" name="LEFT_MAIN">
    <location unit="IN">
      <x>   216.15 </x>
      <y>   -70.83 </y>
      <z>   -51.96 </z>
    </location>
    <static_friction>  0.80 </static_friction>
    <dynamic_friction> 0.50 </dynamic_friction>
    <rolling_friction> 0.02 </rolling_friction>
    <spring_coeff  unit="LBS/FT">     10494.00 </spring_coeff>
    <damping_coeff unit="LBS/FT/SEC"> 5247.00 </damping_coeff>
    <max_steer unit="DEG">0</max_steer>
    <brake_group> LEFT </brake_group>
    <retractable> 1 </retractable>
  </contact>

  <!-- 右主起落架 -->
  <contact type="BOGEY" name="RIGHT_MAIN">
    <location unit="IN">
      <x>   216.15 </x>
      <y>    70.83 </y>
      <z>   -51.96 </z>
    </location>
    <static_friction>  0.80 </static_friction>
    <dynamic_friction> 0.50 </dynamic_friction>
    <rolling_friction> 0.02 </rolling_friction>
    <spring_coeff  unit="LBS/FT">     10494.00 </spring_coeff>
    <damping_coeff unit="LBS/FT/SEC"> 5247.00 </damping_coeff>
    <max_steer unit="DEG">0</max_steer>
    <brake_group> RIGHT </brake_group>
    <retractable> 1 </retractable>
  </contact>

  <!-- 左翼尖结构接地保护 -->
  <contact type="STRUCTURE" name="LEFT_WING">
    <location unit="IN">
     <x>   207.84 </x>
     <y>  -393.50 </y>
     <z>   -10.82 </z>
    </location>
   <static_friction>  1 </static_friction>
   <dynamic_friction> 1 </dynamic_friction>
   <spring_coeff unit="LBS/FT">      10494.00 </spring_coeff>
   <damping_coeff unit="LBS/FT/SEC"> 10494.00 </damping_coeff>
  </contact>

  <!-- 右翼尖结构接地保护 -->
  <contact type="STRUCTURE" name="RIGHT_WING">
    <location unit="IN">
     <x>   207.84 </x>
     <y>   393.50 </y>
     <z>   -10.82 </z>
    </location>
   <static_friction>  1 </static_friction>
   <dynamic_friction> 1 </dynamic_friction>
   <spring_coeff unit="LBS/FT">      10494.00 </spring_coeff>
   <damping_coeff unit="LBS/FT/SEC"> 10494.00 </damping_coeff>
  </contact>

 </ground_reactions>

 <!-- 推进系统模块：发动机、推力器、油箱 -->
 <propulsion>

   <!-- 发动机型号：TPE331-10 -->
   <engine file="TPE331-10">
    <!-- 发动机安装位置 -->
    <location unit="IN">
      <x> 373.09 </x>
      <y>   0.00 </y>
      <z>   0.00 </z>
    </location>
    <!-- 安装角度 -->
    <orient unit="DEG">
      <pitch> 0.00 </pitch>
      <roll>  0.00 </roll>
      <yaw>   0.00 </yaw>
    </orient>
    <!-- 供油口编号 -->
    <feed>0</feed>
    <!-- 直接推力器 -->
    <thruster file="Direct">
     <location unit="IN">
       <x> 373.09 </x>
       <y>   0.00 </y>
       <z>   0.00 </z>
     </location>
     <orient unit="DEG">
       <pitch> 0.00 </pitch>
       <roll>  0.00 </roll>
       <yaw>   0.00 </yaw>
     </orient>
    </thruster>
  </engine>

  <!-- 油箱0：燃油箱 -->
  <tank type="FUEL" number="0">
     <location unit="IN">
       <x> 207.84 </x>
       <y>   0.00 </y>
       <z> -10.83 </z>
     </location>
     <!-- 油箱容量，单位：磅 -->
     <capacity unit="LBS"> 776.56 </capacity>
     <!-- 初始油量，单位：磅 -->
     <contents unit="LBS"> 388.28 </contents>
  </tank>

  <!-- 油箱1：燃油箱 -->
  <tank type="FUEL" number="1">
     <location unit="IN">
       <x> 207.84 </x>
       <y>   0.00 </y>
       <z> -10.83 </z>
     </location>
     <capacity unit="LBS"> 776.56 </capacity>
     <contents unit="LBS"> 388.28 </contents>
  </tank>

 </propulsion>

 <!-- 外部子系统引用 -->
 <system file="Armament"/>
 <system file="Particles"/>
 <system file="Controls"/>

<system file="LandingGear.xml"/>

 <!-- 气动模型核心模块：升力、阻力、侧向力、三轴力矩 -->
 <aerodynamics>

  <!-- 升力轴 -->
  <axis name="LIFT">

    <!-- 迎角产生的升力 -->
    <function name="aero/force/Lift_alpha">
      <description>Lift due to alpha</description>
      <product>
          <property>aero/qbar-psf</property>
          <property>metrics/Sw-sqft</property>
          <table>
            <independentVar lookup="row">aero/alpha-rad</independentVar>
            <tableData>
              -0.20 -0.7494
               0.00  0.4077
               0.25  1.8824
               0.60  0.9976
            </tableData>
          </table>
      </product>
    </function>

    <!-- 俯仰速率产生的升力 -->
    <function name="aero/force/Lift_pitch_rate">
        <description>Lift due to pitch rate</description>
        <product>
          <property>aero/qbar-psf</property>
          <property>metrics/Sw-sqft</property>
          <property>velocities/q-aero-rad_sec</property>
          <property>aero/ci2vel</property>
          <value> 6.4704 </value>
        </product>
      </function>

      <!-- 迎角变化率产生的升力 -->
      <function name="aero/force/Lift_alpha_rate">
        <description>Lift due to alpha rate</description>
        <product>
           <property>aero/qbar-psf</property>
           <property>metrics/Sw-sqft</property>
           <property>aero/alphadot-rad_sec</property>
           <property>aero/ci2vel</property>
           <value> 1.8487 </value>
        </product>
      </function>

    <!-- 升降舵偏转产生的升力 -->
    <function name="aero/force/Lift_elevator">
       <description>Lift due to Elevator Deflection</description>
       <product>
           <property>aero/qbar-psf</property>
           <property>metrics/Sw-sqft</property>
           <property>fcs/elevator-pos-rad</property>
           <value> 0.2732 </value>
       </product>
    </function>

  </axis>

  <!-- 阻力轴 -->
  <axis name="DRAG">

    <!-- 基础零升阻力 -->
    <function name="aero/force/Drag_basic">
       <description>Drag at zero lift</description>
       <product>
          <property>aero/qbar-psf</property>
          <property>metrics/Sw-sqft</property>
          <table>
            <independentVar lookup="row">aero/alpha-rad</independentVar>
            <tableData>
             -1.57    1.4089
             -0.25    0.0508
              0.00    0.0219
              0.25    0.0508
              1.57    1.4089
            </tableData>
          </table>
       </product>
    </function>

    <!-- 诱导阻力 -->
    <function name="aero/force/Drag_induced">
       <description>Induced drag</description>
         <product>
           <property>aero/qbar-psf</property>
           <property>metrics/Sw-sqft</property>
           <property>aero/cl-squared</property>
           <value> 0.0240 </value>
         </product>
    </function>

    <!-- 马赫数相关阻力 -->
    <function name="aero/force/Drag_mach">
       <description>Drag due to mach</description>
        <product>
          <property>aero/qbar-psf</property>
          <property>metrics/Sw-sqft</property>
          <table>
            <independentVar lookup="row">velocities/mach</independentVar>
            <tableData>
                0.00    0.0000
                0.70    0.0000
                1.10    0.0230
                1.80    0.0150
            </tableData>
          </table>
        </product>
    </function>

    <!-- 侧滑角产生的阻力 -->
    <function name="aero/force/Drag_beta">
       <description>Drag due to sideslip</description>
       <product>
          <property>aero/qbar-psf</property>
          <property>metrics/Sw-sqft</property>
          <table>
            <independentVar lookup="row">aero/beta-rad</independentVar>
            <tableData>
              -1.57    1.2300
              -0.26    0.0500
               0.00    0.0000
               0.26    0.0500
               1.57    1.2300
            </tableData>
          </table>
       </product>
    </function>

    <!-- 升降舵偏转产生的阻力 -->
    <function name="aero/force/Drag_elevator">
       <description>Drag due to Elevator Deflection</description>
       <product>
           <property>aero/qbar-psf</property>
           <property>metrics/Sw-sqft</property>
           <abs><property>fcs/elevator-pos-rad</property></abs>
           <value> 0.0400 </value>
       </product>
    </function>

    <!-- 起落架放下产生的阻力 -->
    <function name="aero/force/Drag_gear">
       <description>Drag due to gear</description>
         <product>
           <property>aero/qbar-psf</property>
           <property>metrics/Sw-sqft</property>
           <property>gear/gear-pos-norm</property>
           <value> 0.0300 </value>
         </product>
    </function>

  </axis>

  <!-- 侧向力轴 -->
  <axis name="SIDE">

    <!-- 侧滑角产生的侧向力 -->
    <function name="aero/force/Side_beta">
       <description>Side force due to beta</description>
       <product>
           <property>aero/qbar-psf</property>
           <property>metrics/Sw-sqft</property>
           <property>aero/beta-rad</property>
           <value> -0.2310 </value>
       </product>
    </function>
    <!-- 滚转速率产生的侧向力 -->
    <function name="aero/force/Side_roll_rate">
       <description>Side force due to roll rate</description>
       <product>
           <property>aero/qbar-psf</property>
           <property>metrics/Sw-sqft</property>
           <property>aero/bi2vel</property>
           <property>velocities/p-aero-rad_sec</property>
           <table>
             <independentVar lookup="row">aero/Re</independentVar>
             <tableData>
                 3372885   1.3390
                 3710173   0.1141
                 5059327   0.0507
                 6689612   0.0290
             </tableData>
           </table>
       </product>
    </function>

    <!-- 偏航速率产生的侧向力 -->
    <function name="aero/force/Side_yaw_rate">
       <description>Side force due to yaw rate</description>
       <product>
           <property>aero/qbar-psf</property>
           <property>metrics/Sw-sqft</property>
           <property>aero/bi2vel</property>
           <property>velocities/r-aero-rad_sec</property>
           <value> 0.1271 </value>
       </product>
    </function>

    <!-- 方向舵产生的侧向力 -->
    <function name="aero/force/Side_rudder">
       <description>Side force due to rudder</description>
       <product>
           <property>aero/qbar-psf</property>
           <property>metrics/Sw-sqft</property>
           <property>fcs/rudder-pos-rad</property>
           <value> 0.1407 </value>
       </product>
    </function>

  </axis>

  <!-- 俯仰力矩轴 -->
  <axis name="PITCH">

    <!-- 迎角产生的俯仰力矩 -->
    <function name="aero/moment/Pitch_alpha">
       <description>Pitch moment due to alpha</description>
       <product>
           <property>aero/qbar-psf</property>
           <property>metrics/Sw-sqft</property>
           <property>metrics/cbarw-ft</property>
           <property>aero/alpha-rad</property>
           <value> -2.3270 </value>
       </product>
    </function>

    <!-- 升降舵产生的俯仰力矩 -->
    <function name="aero/moment/Pitch_elevator">
       <description>Pitch moment due to elevator</description>
       <product>
          <property>aero/qbar-psf</property>
          <property>metrics/Sw-sqft</property>
          <property>metrics/cbarw-ft</property>
          <property>fcs/elevator-pos-rad</property>
          <table>
            <independentVar lookup="row">velocities/mach</independentVar>
            <tableData>
              0.0    -2.0259
              2.0    -0.5065
            </tableData>
          </table>
       </product>
    </function>

    <!-- 俯仰阻尼力矩 -->
    <function name="aero/moment/Pitch_damp">
       <description>Pitch moment due to pitch rate</description>
       <product>
           <property>aero/qbar-psf</property>
           <property>metrics/Sw-sqft</property>
           <property>metrics/cbarw-ft</property>
           <property>aero/ci2vel</property>
           <property>velocities/q-aero-rad_sec</property>
           <value> -30.9711 </value>
       </product>
    </function>

    <!-- 迎角变化率产生的俯仰力矩 -->
    <function name="aero/moment/Pitch_alphadot">
       <description>Pitch moment due to alpha rate</description>
       <product>
           <property>aero/qbar-psf</property>
           <property>metrics/Sw-sqft</property>
           <property>metrics/cbarw-ft</property>
           <property>aero/ci2vel</property>
           <property>aero/alphadot-rad_sec</property>
           <value> -8.8489 </value>
       </product>
    </function>

  </axis>

  <!-- 滚转力矩轴 -->
  <axis name="ROLL">

    <!-- 侧滑角产生的滚转力矩 -->
    <function name="aero/moment/Roll_beta">
       <description>Roll moment due to beta</description>
       <product>
           <property>aero/qbar-psf</property>
           <property>metrics/Sw-sqft</property>
           <property>metrics/bw-ft</property>
           <property>aero/beta-rad</property>
           <table>
             <independentVar lookup="row">aero/alpha-rad</independentVar>
             <independentVar lookup="column">aero/Re</independentVar>
             <tableData>
                          3372885  3710173  5059327  6689612
                 -0.0349  -0.2578  -0.0647  -0.0550  -0.0520
                  0.3491  -0.6826  -0.1159  -0.1086  -0.1100
             </tableData>
           </table>
       </product>
    </function>

    <!-- 滚转阻尼力矩 -->
    <function name="aero/moment/Roll_damp">
       <description>Roll moment due to roll rate</description>
       <product>
           <property>aero/qbar-psf</property>
           <property>metrics/Sw-sqft</property>
           <property>metrics/bw-ft</property>
           <property>aero/bi2vel</property>
           <property>velocities/p-aero-rad_sec</property>
           <value> -0.7313 </value>
       </product>
    </function>

    <!-- 偏航速率产生的滚转力矩 -->
    <function name="aero/moment/Roll_yaw">
       <description>Roll moment due to yaw rate</description>
       <product>
           <property>aero/qbar-psf</property>
           <property>metrics/Sw-sqft</property>
           <property>metrics/bw-ft</property>
           <property>aero/bi2vel</property>
           <property>velocities/r-aero-rad_sec</property>
           <table>
             <independentVar lookup="row">aero/alpha-rad</independentVar>
             <independentVar lookup="column">aero/Re</independentVar>
             <tableData>
                          3372885  3710173  5059327  6689612
                 -0.0349   0.1627   0.0587   0.0533   0.0514
                  0.3491   4.8174   0.6140   0.6086   0.6068
             </tableData>
           </table>
       </product>
    </function>

    <!-- 副翼产生的滚转力矩 -->
    <function name="aero/moment/Roll_aileron">
       <description>Roll moment due to aileron</description>
       <product>
          <property>aero/qbar-psf</property>
          <property>metrics/Sw-sqft</property>
          <property>metrics/bw-ft</property>
          <property>fcs/left-aileron-pos-rad</property>
           <table>
            <independentVar lookup="row">velocities/mach</independentVar>
            <tableData>
              0.0    0.1700
              2.0    0.0425
            </tableData>
          </table>
       </product>
    </function>

    <!-- 方向舵产生的滚转力矩 -->
    <function name="aero/moment/Roll_rudder">
       <description>Roll moment due to rudder</description>
       <product>
           <property>aero/qbar-psf</property>
           <property>metrics/Sw-sqft</property>
           <property>metrics/bw-ft</property>
           <property>fcs/rudder-pos-rad</property>
           <value> 0.0100 </value>
       </product>
    </function>

  </axis>

  <!-- 偏航力矩轴 -->
  <axis name="YAW">

    <!-- 迎角产生的偏航力矩 -->
    <function name="aero/moment/Yaw_alpha">
       <description>Yaw moment due to alpha</description>
       <product>
           <property>aero/qbar-psf</property>
           <property>metrics/Sw-sqft</property>
           <property>metrics/bw-ft</property>
           <property>aero/alpha-rad</property>
           <property>fcs/gear-no-wow</property>
           <table>
             <independentVar lookup="row">aero/beta-rad</independentVar>
             <independentVar lookup="column">aero/Re</independentVar>
             <tableData>
                          3372885  3710173
                 -0.3491  -1.0000   0.0000
                  0.3491   1.0000   0.0000
             </tableData>
           </table>
       </product>
    </function>

    <!-- 侧滑角产生的偏航力矩 -->
    <function name="aero/moment/Yaw_beta">
       <description>Yaw moment due to beta</description>
       <product>
           <property>aero/qbar-psf</property>
           <property>metrics/Sw-sqft</property>
           <property>metrics/bw-ft</property>
           <property>aero/beta-rad</property>
           <value> 0.0635 </value>
       </product>
    </function>

    <!-- 滚转速率产生的偏航力矩 -->
    <function name="aero/moment/Yaw_roll_rate">
       <description>Yaw moment due to roll rate</description>
       <product>
           <property>aero/qbar-psf</property>
           <property>metrics/Sw-sqft</property>
           <property>metrics/bw-ft</property>
           <property>aero/bi2vel</property>
           <property>velocities/p-rad_sec</property>
           <table>
             <independentVar lookup="row">aero/Re</independentVar>
             <tableData>
                 3372885  -2.3531
                 3710173  -0.2005
                 5059327  -0.0891
                 6689612  -0.0510
             </tableData>
           </table>
       </product>
    </function>

    <!-- 偏航阻尼力矩 -->
    <function name="aero/moment/Yaw_damp">
       <description>Yaw moment due to yaw rate</description>
       <product>
           <property>aero/qbar-psf</property>
           <property>metrics/Sw-sqft</property>
           <property>metrics/bw-ft</property>
           <property>aero/bi2vel</property>
           <property>velocities/r-aero-rad_sec</property>
           <value> -0.0474 </value>
       </product>
    </function>

    <!-- 方向舵产生的偏航力矩 -->
    <function name="aero/moment/Yaw_rudder">
       <description>Yaw moment due to rudder</description>
       <product>
           <property>aero/qbar-psf</property>
           <property>metrics/Sw-sqft</property>
           <property>metrics/bw-ft</property>
           <property>fcs/rudder-pos-rad</property>
           <value> -0.0387 </value>
       </product>
    </function>

    <!-- 副翼产生的不利偏航力矩 -->
    <function name="aero/moment/Yaw_aileron">
       <description>Adverse yaw</description>
       <product>
           <property>aero/qbar-psf</property>
           <property>metrics/Sw-sqft</property>
           <property>metrics/bw-ft</property>
           <property>fcs/left-aileron-pos-rad</property>
           <value> -0.0100 </value>
       </product>
    </function>

  </axis>

 </aerodynamics>
 </fdm_config>
